# OpenSim document version 40600
Model:
  StationDefinedFrame: socket_point_a=/markerset/landmark_2 socket_point_b=/markerset/datapoint_0
      socket_point_c=/markerset/datapoint_1 socket_origin_point=/markerset/landmark_2
  Ground: meshes=C:\Users\adamk\Desktop\opensim-creator\build_resources\TestOpenSimCreator\Document\ModelWarper\StationDefinedFramePaired\Geometry\mesh.obj
  BodySet:
    Body new_body: mass=1 [kg] mass_center=(0 0 0) inertia=(1 1 1 0 0 0)
      Brick new_body_geom_1: half_lengths=(0.1 0.1 0.1)
  JointSet:
    PinJoint: socket_parent_frame=/StationDefinedFrame socket_child_frame=/bodyset/new_body
      Coordinate rz
  MarkerSet:
    Marker datapoint_0: ground (0.556719 0.830249 -0.001711)
    Marker datapoint_1: ground (0.649968 0.39611 0.645569)
    Marker landmark_2: ground (0.704394 0.708321 0.006198)
