# OpenSim document version 40600
Model:
  Station: ground (-0.4287558 0.4694616 0.5040026)
  Station Station_0: ground (0 0.2802418 0.5092817)
  Ground: meshes=source_cube.obj
    PhysicalOffsetFrame ground_offsetframe: socket_parent=.. translation=(0.5 0.5 0.5) [meters]
  BodySet:
    Body child_body: mass=1 [kg] mass_center=(0 0 0) inertia=(1 1 1 0 0 0)
        meshes=C:\Users\adamk\Desktop\ModelWarperV3Docs\01_TPSWarpableCube\Geometry\source_cube.obj
  JointSet:
    WeldJoint: socket_parent_frame=ground_offset socket_child_frame=child_body_offset
      PhysicalOffsetFrame ground_offset: socket_parent=/ground translation=(0.625 0.25 0.25)
      PhysicalOffsetFrame child_body_offset: socket_parent=/bodyset/child_body
  ForceSet:
    Millard2012EquilibriumMuscle: min_control=0.01 max_control=1
      PathPoint Millard2012EquilibriumMuscle-P1: ground (-0.4287558 0.4694616 0.5040026)
      PathPoint Millard2012EquilibriumMuscle-P2: ground (0 0.2802418 0.5092817)
      ActiveForceLengthCurve: minimum_value=0
      ForceVelocityCurve: concentric_slope_at_vmax=0 concentric_slope_near_vmax=0.25 isometric_slope=5
          eccentric_slope_at_vmax=0 eccentric_slope_near_vmax=0.15 max_eccentric_velocity_force_multiplier=1.4
      FiberForceLengthCurve
      TendonForceLengthCurve
