# OpenSim document version 40600
ModelWarperV3Document:
  ThinPlateSplineMeshesScalingStep: label=(Apply Thin-Plate Spline (TPS) Warp to Meshes) meshes=/ground/ground_geom_1
      source_landmarks_file=Geometry/source_landmarks.csv destination_landmarks_file=Geometry/destination_landmarks.csv
  ThinPlateSplineOffsetFrameTranslationScalingStep: offset_frames=(/jointset/weldjoint/ground_offset /ground/ground_offsetframe)
      source_landmarks_file=Geometry/source_landmarks.csv destination_landmarks_file=Geometry/destination_landmarks.csv
  ThinPlateSplinePathPointsScalingStep: path_points=(/forceset/Millard2012EquilibriumMuscle/path/Millard2012EquilibriumMuscle-P1 /forceset/Millard2012EquilibriumMuscle/path/Millard2012EquilibriumMuscle-P2)
      source_landmarks_file=Geometry/source_landmarks.csv destination_landmarks_file=Geometry/destination_landmarks.csv
  ThinPlateSplinePathPointsScalingStep: path_points=(/forceset/Millard2012EquilibriumMuscle/path/Millard2012EquilibriumMuscle-P1 /forceset/Millard2012EquilibriumMuscle/path/Millard2012EquilibriumMuscle-P2)
      source_landmarks_file=Geometry/source_landmarks.csv destination_landmarks_file=Geometry/destination_landmarks.csv
  ThinPlateSplinePathPointsScalingStep: path_points=(/forceset/Millard2012EquilibriumMuscle/path/Millard2012EquilibriumMuscle-P1 /forceset/Millard2012EquilibriumMuscle/path/Millard2012EquilibriumMuscle-P2)
      source_landmarks_file=Geometry/source_landmarks.csv destination_landmarks_file=Geometry/destination_landmarks.csv
  scaling_parameter_overrides:
    ScalingParameterOverride: parameter_name=subject_mass parameter_value=150
    ScalingParameterOverride: parameter_name=blending_factor parameter_value=0.1
