# OpenSim document version 40000
Model:
  Ground
  BodySet:
    Body new_body: mass=1 [kg] mass_center=(0 0 0) inertia=(1 1 1 0 0 0)
  JointSet:
    FreeJoint: socket_parent_frame=ground_offset socket_child_frame=new_body_offset
      Coordinate rx
      Coordinate ry
      Coordinate rz
      Coordinate tx
      Coordinate ty
      Coordinate tz
      PhysicalOffsetFrame ground_offset: socket_parent=/ground
      PhysicalOffsetFrame new_body_offset: socket_parent=/bodyset/new_body
  ConstraintSet:
    CoordinateCouplerConstraint: dependent_coordinate_name=ty independent_coordinate_names=tx
