# OpenSim document version 40000
Model:
  Ground
  BodySet:
    Body body1: mass=1 [kg] mass_center=(0 0 0) inertia=(1 1 1 0 0 0)
    Body body2: mass=1 mass_center=(0 0 0) inertia=(1 1 1 0 0 0)
  JointSet:
    WeldJoint: socket_parent_frame=/ground socket_child_frame=/bodyset/body1
    WeldJoint weldjoint_0: socket_parent_frame=/ground socket_child_frame=/bodyset/body2
  ForceSet:
    PointToPointActuator
