# OpenSim document version 40000
Model:
  Ground
  BodySet:
    Body new_body: mass=1 [kg] mass_center=(0 0 0) inertia=(1 1 1 0 0 0)
  JointSet:
    FreeJoint: socket_parent_frame=/ground socket_child_frame=/bodyset/new_body
      Coordinate rx
      Coordinate ry
      Coordinate rz
      Coordinate tx
      Coordinate ty
      Coordinate tz
  ForceSet:
    SpringGeneralizedForce
