# OpenSim document version 40000
Model:
  BodySet:
    Body pectoral_girdle_b_slave_0: mass=1 inertia=(0.01 0.01 0.01 0 0 0)
    Body radius_b: mass=1 inertia=(0.01 0.01 0.01 0 0 0)
    Body ulna_b: mass=1 inertia=(0.01 0.01 0.01 0 0 0)
    Body humerus_b: mass=1 inertia=(0.01 0.01 0.01 0 0 0)
    Body pectoral_girdle_b: mass=1 inertia=(0.01 0.01 0.01 0 0 0)
    Body furcula_b: mass=1 inertia=(0.01 0.01 0.01 0 0 0)
  JointSet:
    WeldJoint pectoral_girdle_b_slave_0_to_ground: socket_parent_frame=ground_offset
        socket_child_frame=pectoral_girdle_b_slave_0_offset
      PhysicalOffsetFrame ground_offset: socket_parent=/ground
      PhysicalOffsetFrame pectoral_girdle_b_slave_0_offset: socket_parent=/bodyset/pectoral_girdle_b_slave_0
    WeldJoint radius_b_to_ground: socket_parent_frame=ground_offset socket_child_frame=radius_b_offset
      PhysicalOffsetFrame ground_offset: socket_parent=/ground
      PhysicalOffsetFrame radius_b_offset: socket_parent=/bodyset/radius_b
    WeldJoint radius_to_ulna: socket_parent_frame=radius_b_offset socket_child_frame=ulna_b_offset
      PhysicalOffsetFrame radius_b_offset: socket_parent=/bodyset/radius_b
      PhysicalOffsetFrame ulna_b_offset: socket_parent=/bodyset/ulna_b
    PinJoint elbow: socket_parent_frame=ulna_b_offset socket_child_frame=humerus_b_offset
      PhysicalOffsetFrame ulna_b_offset: socket_parent=/bodyset/ulna_b
      PhysicalOffsetFrame humerus_b_offset: socket_parent=/bodyset/humerus_b
    PinJoint shoulder: socket_parent_frame=humerus_b_offset socket_child_frame=pectoral_girdle_b_offset
      PhysicalOffsetFrame humerus_b_offset: socket_parent=/bodyset/humerus_b
      PhysicalOffsetFrame pectoral_girdle_b_offset: socket_parent=/bodyset/pectoral_girdle_b
    WeldJoint forelimb_to_ground: socket_parent_frame=ground_offset socket_child_frame=furcula_b_offset
      PhysicalOffsetFrame ground_offset: socket_parent=/ground
      PhysicalOffsetFrame furcula_b_offset: socket_parent=/bodyset/furcula_b
    WeldJoint pectoral_girdle_to_furcula: socket_parent_frame=furcula_b_offset
        socket_child_frame=pectoral_girdle_b_offset
      PhysicalOffsetFrame furcula_b_offset: socket_parent=/bodyset/furcula_b
      PhysicalOffsetFrame pectoral_girdle_b_offset: socket_parent=/bodyset/pectoral_girdle_b
