# OpenSim document version 40600
ModelWarperV3Document:
  ThinPlateSplineMeshesScalingStep: source_landmarks_file=Geometry/femur_r.landmarks.csv
      destination_landmarks_file=Geometry/subject_femur_r.landmarks.csv landmarks_frame=/bodyset/femur_r
      destination_landmarks_prescale=0.001 [meters] meshes=/bodyset/femur_r/femur_r_geom_1
  ThinPlateSplineStationsScalingStep: source_landmarks_file=Geometry/femur_r.landmarks.csv
      destination_landmarks_file=Geometry/subject_femur_r.landmarks.csv landmarks_frame=/bodyset/femur_r
      destination_landmarks_prescale=0.001 [meters]
      stations=(/bodyset/femur_r/femur_r_head /bodyset/femur_r/femur_r_med_condyl /bodyset/femur_r/femur_r_lat_condyl /bodyset/femur_r/femur_r_condyls_midpoint)
  ThinPlateSplineWrapCylinderScalingStep: source_landmarks_file=Geometry/femur_r.landmarks.csv
      destination_landmarks_file=Geometry/subject_femur_r.landmarks.csv landmarks_frame=/bodyset/femur_r
      destination_landmarks_prescale=0.001 [meters] wrap_cylinders=/bodyset/femur_r/wrapobjectset/femur_r_condyl_wrap
  ThinPlateSplinePathPointsScalingStep: source_landmarks_file=Geometry/femur_r.landmarks.csv
      destination_landmarks_file=Geometry/subject_femur_r.landmarks.csv landmarks_frame=/bodyset/femur_r
      destination_landmarks_prescale=0.001 [meters]
      path_points=/forceset/Millard2012EquilibriumMuscle/path/Millard2012EquilibriumMuscle-P1
