# OpenSim document version 40600
Model:
  Ground
  BodySet:
    Body pelvis: mass=1 [kg] mass_center=(0 0 0) inertia=(1 1 1 0 0 0) meshes=(pelvis_l.obj pelvis_r.obj)
      Marker ASIS_l: .. (0.007526 -0.009014 -0.119626)
      Marker ASIS_midpoint: .. (0.008468 -0.007887 -0.000379)
      Marker ASIS_r: .. (0.00941 -0.00676 0.118869)
      Marker Acetabulum_centre: .. (0.082959 -0.049452 0.07726)
      Marker PSIS_l: .. (-0.005882 -0.129964 -0.03686)
      Marker PSIS_midpoint: .. (-0.008095 -0.130105 -0.000412)
      Marker PSIS_r: .. (-0.010309 -0.130246 0.036036)
      StationDefinedFrame pelvis_frame: socket_point_a=/bodyset/pelvis/ASIS_midpoint
          socket_point_b=/bodyset/pelvis/PSIS_midpoint socket_point_c=/bodyset/pelvis/ASIS_r
          socket_origin_point=/bodyset/pelvis/ASIS_midpoint ab_axis=-x
      StationDefinedFrame hip_r_frame: socket_point_a=/bodyset/pelvis/PSIS_midpoint
          socket_point_b=/bodyset/pelvis/ASIS_midpoint socket_point_c=/bodyset/pelvis/ASIS_l
          socket_origin_point=/bodyset/pelvis/Acetabulum_centre
    Body femur_r: mass=1 mass_center=(0 0 0) inertia=(1 1 1 0 0 0) meshes=femur_r.obj
      Marker femur_r_epicondyle_centroid: .. (0.483924 -0.019068 0.117418)
      Marker femur_r_epicondyle_lat: .. (0.482677 -0.034081 0.147277)
      Marker femur_r_epicondyle_med: .. (0.485171 -0.004055 0.08756)
      Marker femur_r_head_center: .. (0.082959 -0.049452 0.07726)
      StationDefinedFrame hip_r_child_frame: socket_point_a=/bodyset/femur_r/femur_r_epicondyle_centroid
          socket_point_b=/bodyset/femur_r/femur_r_head_center socket_point_c=/bodyset/femur_r/femur_r_epicondyle_lat
          socket_origin_point=/bodyset/femur_r/femur_r_head_center ab_axis=+y ab_x_ac_axis=+x
      StationDefinedFrame knee_r_frame: socket_point_a=/bodyset/femur_r/femur_r_epicondyle_centroid
          socket_point_b=/bodyset/femur_r/femur_r_epicondyle_lat socket_point_c=/bodyset/femur_r/femur_r_head_center
          socket_origin_point=/bodyset/femur_r/femur_r_epicondyle_centroid ab_axis=+z ab_x_ac_axis=-x
        WrapCylinder knee_wrap: quadrant=+x radius=0.0225 length=0.1
    Body tibia_r: mass=1 mass_center=(0 0 0) inertia=(1 1 1 0 0 0) meshes=tibia_r.vtp
  JointSet:
    FreeJoint pelvis_to_ground: socket_parent_frame=/ground socket_child_frame=/bodyset/pelvis/pelvis_frame
      Coordinate pelvis_list: default_value=0
      Coordinate pelvis_rotation: default_value=0
      Coordinate pelvis_tilt: default_value=0
      Coordinate pelvis_tx: default_value=0
      Coordinate pelvis_ty: default_value=0
      Coordinate pelvis_tz: default_value=0
    BallJoint hip_r: socket_parent_frame=/bodyset/pelvis/hip_r_frame
        socket_child_frame=/bodyset/femur_r/hip_r_child_frame
      Coordinate hip_adduction_r: default_value=0 range=(-0.9 0.5)
      Coordinate hip_rotation_r: default_value=0 range=(-0.7 0.7)
      Coordinate hip_flexion_r: default_value=0 range=(-0.6 2.1)
    PinJoint knee_r: socket_parent_frame=/bodyset/femur_r/knee_r_frame socket_child_frame=/bodyset/tibia_r
      Coordinate knee_angle_r: default_value=-0.9770877 range=(-2.1 0)
  ForceSet:
    Millard2012EquilibriumMuscle glmed_r: min_control=0.01 max_control=1
      PathPoint P1: pelvis (-0.024315 -0.087363 0.0675)
      PathPoint P2: femur_r (0.087685 -0.094538 0.114963)
      ActiveForceLengthCurve: minimum_value=0
      ForceVelocityCurve: concentric_slope_at_vmax=0 concentric_slope_near_vmax=0.25 isometric_slope=5
          eccentric_slope_at_vmax=0 eccentric_slope_near_vmax=0.15 max_eccentric_velocity_force_multiplier=1.4
      FiberForceLengthCurve
      TendonForceLengthCurve
    Millard2012EquilibriumMuscle semimem_r: min_control=0.01 max_control=1
      PathPoint P1: pelvis (0.121922 -0.088729 0.0614)
      PathPoint P2: tibia_r (-0.029 -0.0417 -0.0196)
      ActiveForceLengthCurve: minimum_value=0
      ForceVelocityCurve: concentric_slope_at_vmax=0 concentric_slope_near_vmax=0.25 isometric_slope=5
          eccentric_slope_at_vmax=0 eccentric_slope_near_vmax=0.15 max_eccentric_velocity_force_multiplier=1.4
      FiberForceLengthCurve
      TendonForceLengthCurve
    Millard2012EquilibriumMuscle recfem_r: min_control=0.01 max_control=1
      PathPoint P1: pelvis (0.040687 -0.020641 0.0933)
      PathPoint P2: tibia_r (0.0326 -0.06312 -0.00047)
      PathWrap: wrap_object=knee_wrap method=hybrid
      ActiveForceLengthCurve: minimum_value=0
      ForceVelocityCurve: concentric_slope_at_vmax=0 concentric_slope_near_vmax=0.25 isometric_slope=5
          eccentric_slope_at_vmax=0 eccentric_slope_near_vmax=0.15 max_eccentric_velocity_force_multiplier=1.4
      FiberForceLengthCurve
      TendonForceLengthCurve
  MarkerSet:
    Marker T10: pelvis (-0.2641 -0.165269 0.001202) fixed=true
    Marker RASI: pelvis (-0.017746 0.015814 0.12782) fixed=true
    Marker LASI: pelvis (-0.019401 0.016107 -0.128174) fixed=true
    Marker SACR: pelvis (-0.052656 -0.161066 -0.000159) fixed=true
    Marker RT1: femur_r (0.27586 -0.047221 0.162137)
    Marker RT2: femur_r (0.321811 0.038404 0.141705)
    Marker RT3: femur_r (0.376195 -0.045018 0.164968)
    Marker RKNE: femur_r (0.481054 -0.041593 0.161965) fixed=true
    Marker RANK: tibia_r (-0.005 -0.41 0.053) fixed=true
    Marker RS1: tibia_r (0.005 -0.065 0.05)
    Marker RS2: tibia_r (0.05 -0.08 0)
    Marker RS3: tibia_r (0.02 -0.13 0.05)
