# OpenSim document version 40600
Model:
  Ground
  BodySet:
    Body pelvis: mass=1 [kg] mass_center=(0 0 0) inertia=(1 1 1 0 0 0)
        meshes=(C:\Users\adamk\Desktop\opensim-creator\docs\source\_static\the-model-warper\walkthrough-model\Geometry\pelvis_l.obj C:\Users\adamk\Desktop\opensim-creator\docs\source\_static\the-model-warper\walkthrough-model\Geometry\pelvis_r.obj)
      Marker ASIS_l: .. (0.007526 -0.009014 -0.119626)
      Marker ASIS_midpoint: .. (0.008468 -0.007887 -0.000379)
      Marker ASIS_r: .. (0.00941 -0.00676 0.118869)
      Marker Acetabulum_centre: .. (0.082959 -0.049452 0.07726)
      Marker PSIS_l: .. (-0.005882 -0.129964 -0.03686)
      Marker PSIS_midpoint: .. (-0.008095 -0.130105 -0.000412)
      Marker PSIS_r: .. (-0.010309 -0.130246 0.036036)
      Marker glmed2_r: .. (-0.024315 -0.087363 0.0675)
      Marker recfem_r: .. (0.040687 -0.020641 0.0933)
      Marker semimem_r: .. (0.121922 -0.088729 0.0614)
      StationDefinedFrame pelvis_frame: socket_point_a=/bodyset/pelvis/ASIS_midpoint
          socket_point_b=/bodyset/pelvis/PSIS_midpoint socket_point_c=/bodyset/pelvis/ASIS_r
          socket_origin_point=/bodyset/pelvis/ASIS_midpoint ab_axis=-x
      StationDefinedFrame hip_r_frame: socket_point_a=/bodyset/pelvis/PSIS_midpoint
          socket_point_b=/bodyset/pelvis/ASIS_midpoint socket_point_c=/bodyset/pelvis/ASIS_l
          socket_origin_point=/bodyset/pelvis/Acetabulum_centre
    Body femur_r: mass=1 mass_center=(0 0 0) inertia=(1 1 1 0 0 0)
        meshes=C:\Users\adamk\Desktop\opensim-creator\docs\source\_static\the-model-warper\walkthrough-model\Geometry\femur_r.obj
      Marker femur_r_epicondyle_centroid: .. (0.483924 -0.019068 0.117418)
      Marker femur_r_epicondyle_lat: .. (0.482677 -0.034081 0.147277)
      Marker femur_r_epicondyle_med: .. (0.485171 -0.004055 0.08756)
      Marker femur_r_head_center: .. (0.082959 -0.049452 0.07726)
      Marker glmed2_r: .. (0.087685 -0.094538 0.114963)
      StationDefinedFrame hip_r_child_frame: socket_point_a=/bodyset/femur_r/femur_r_epicondyle_centroid
          socket_point_b=/bodyset/femur_r/femur_r_head_center socket_point_c=/bodyset/femur_r/femur_r_epicondyle_lat
          socket_origin_point=/bodyset/femur_r/femur_r_head_center ab_axis=+y ab_x_ac_axis=+x
      StationDefinedFrame knee_r_frame: socket_point_a=/bodyset/femur_r/femur_r_epicondyle_centroid
          socket_point_b=/bodyset/femur_r/femur_r_head_center socket_point_c=/bodyset/femur_r/femur_r_epicondyle_lat
          socket_origin_point=/bodyset/femur_r/femur_r_epicondyle_centroid ab_axis=+y ab_x_ac_axis=+x
    Body tibia_r: mass=1 mass_center=(0 0 0) inertia=(1 1 1 0 0 0)
        meshes=C:\Users\adamk\Desktop\opensim-creator\docs\source\_static\the-model-warper\walkthrough-model\Geometry\tibia_r.vtp
  JointSet:
    WeldJoint: socket_parent_frame=ground_offset socket_child_frame=/bodyset/pelvis/pelvis_frame
      PhysicalOffsetFrame ground_offset: socket_parent=/ground
      PhysicalOffsetFrame pelvis_offset: socket_parent=/bodyset/pelvis
    BallJoint hip_r: socket_parent_frame=hip_r_frame_offset socket_child_frame=/bodyset/femur_r/hip_r_child_frame
      Coordinate rx
      Coordinate ry
      Coordinate rz
      PhysicalOffsetFrame hip_r_frame_offset: socket_parent=/bodyset/pelvis/hip_r_frame
      PhysicalOffsetFrame femur_r_offset: socket_parent=/bodyset/femur_r
    PinJoint knee_r: socket_parent_frame=/bodyset/femur_r/knee_r_frame socket_child_frame=/bodyset/tibia_r
      Coordinate rz
