# OpenSim document version 40600
Model:
  Ground
  BodySet:
    Body femur_r: mass=1 [kg] mass_center=(0 0 0) inertia=(1 1 1 0 0 0) meshes=femur_r.vtp
      Station femur_r_head: .. (0 0 0)
      Station femur_r_med_condyl: .. (-0.02026586 -0.4077674 -0.02408739)
      Station femur_r_lat_condyl: .. (-0.02204105 -0.4063092 0.02193349)
      Station femur_r_condyls_midpoint: .. (-0.0211535 -0.407038 -0.001077)
      StationDefinedFrame femur_r_knee_frame: socket_point_a=/bodyset/femur_r/femur_r_condyls_midpoint
          socket_point_b=/bodyset/femur_r/femur_r_head socket_point_c=/bodyset/femur_r/femur_r_lat_condyl
          socket_origin_point=/bodyset/femur_r/femur_r_condyls_midpoint ab_axis=y ab_x_ac_axis=x
      WrapCylinder femur_r_condyl_wrap: xyz_body_rotation=(0 0 -1.945641)
          translation=(0.006854282 -0.4021159 -0.0001765034) quadrant=y radius=0.02999998 length=0.07099998
    Body tibia_r: mass=1 mass_center=(0 0 0) inertia=(1 1 1 0 0 0) meshes=(fibula_r.vtp tibia_r.vtp)
  JointSet:
    WeldJoint: socket_parent_frame=ground_offset socket_child_frame=femur_r_offset
      PhysicalOffsetFrame ground_offset: socket_parent=/ground translation=(0 0.9315226 0) [meters]
      PhysicalOffsetFrame femur_r_offset: socket_parent=/bodyset/femur_r
    PinJoint knee_r: socket_parent_frame=femur_r_knee_frame_offset socket_child_frame=fibula_r_offset
      Coordinate rz: default_value=-0.7107247 range=(-3 0.2)
      PhysicalOffsetFrame femur_r_knee_frame_offset: socket_parent=/bodyset/femur_r/femur_r_knee_frame
      PhysicalOffsetFrame fibula_r_offset: socket_parent=/bodyset/tibia_r
  ForceSet:
    Millard2012EquilibriumMuscle: min_control=0.01 max_control=1
      PathPoint Millard2012EquilibriumMuscle-P1: femur_r (0.01801134 -0.02191627 0.003631897)
      PathPoint Millard2012EquilibriumMuscle-P2: tibia_r (0.04121959 -0.07710596 0.000885757)
      PathWrap: wrap_object=femur_r_condyl_wrap method=hybrid
      ActiveForceLengthCurve: minimum_value=0
      ForceVelocityCurve: concentric_slope_at_vmax=0 concentric_slope_near_vmax=0.25 isometric_slope=5
          eccentric_slope_at_vmax=0 eccentric_slope_near_vmax=0.15 max_eccentric_velocity_force_multiplier=1.4
      FiberForceLengthCurve
      TendonForceLengthCurve
