# OpenSim document version 40600
Model:
  Ground
  BodySet:
    Body pelvis_r: mass=1 [kg] mass_center=(0 0 0) inertia=(1 1 1 0 0 0)
        meshes=(U:\LoaD Project\documents\workshopESMAC\walkthrough-model\Geometry\pelvis_r.vtp)
      Marker Acetabulum_centre: .. (-0.056276 -0.07849 0.07726)
      Marker ASIS_r: .. (-0.00753 -0.008806 0.118869)
      Marker ASIS_l: .. (-0.009617 -0.006739 -0.119626)
      Marker ASIS_midpoint: .. (-0.0085735 -0.0077725 -0.0003785)
      Marker PSIS_r: .. (-0.128912 0.021262 0.036036)
      Marker PSIS_l: .. (-0.129004 0.016827 -0.03686)
      Marker PSIS_midpoint: .. (-0.128958 0.0190445 -0.000412)
      StationDefinedFrame hip_r_frame: socket_point_a=/bodyset/pelvis_r/PSIS_midpoint
          socket_point_b=/bodyset/pelvis_r/ASIS_midpoint socket_point_c=/bodyset/pelvis_r/ASIS_l
          socket_origin_point=/bodyset/pelvis_r/Acetabulum_centre
    Body pelvis_l: mass=1 mass_center=(0 0 0) inertia=(1 1 1 0 0 0)
        meshes=(U:\LoaD Project\documents\workshopESMAC\walkthrough-model\Geometry\pelvis_l.vtp)
  JointSet:
    WeldJoint pelvis_r_ground: socket_parent_frame=ground_offset socket_child_frame=pelvis_r_offset
      PhysicalOffsetFrame ground_offset: socket_parent=/ground
      PhysicalOffsetFrame pelvis_r_offset: socket_parent=/bodyset/pelvis_r
    WeldJoint pelvis_l_ground: socket_parent_frame=ground_offset socket_child_frame=pelvis_l_offset
      PhysicalOffsetFrame ground_offset: socket_parent=/ground
      PhysicalOffsetFrame pelvis_l_offset: socket_parent=/bodyset/pelvis_l
