# OpenSim document version 40000
Model:
  Ground
  BodySet:
    Body pendulum_base: mass=1 [kg] mass_center=(0 0 0) inertia=(1 1 1 0 0 0)
      Brick pendulum_base_geom_1: half_lengths=(0.2 0.01 0.2)
    Body pendulum_head: mass=1 mass_center=(0 0 0) inertia=(1 1 1 0 0 0)
      PhysicalOffsetFrame pendulum_head_offsetframe: socket_parent=.. translation=(0 0.25 0) [meters]
        Cylinder pendulum_head_offsetframe_geom_1: radius=0.01 half_height=0.25
      Sphere pendulum_head_geom_1: radius=0.05
  JointSet:
    WeldJoint pendulum_base_to_ground: socket_parent_frame=ground_offset socket_child_frame=pendulum_base_offset
      PhysicalOffsetFrame ground_offset: socket_parent=/ground translation=(0 1 0)
      PhysicalOffsetFrame pendulum_base_offset: socket_parent=/bodyset/pendulum_base
    PinJoint pendulum_head_to_pendulum_base: socket_parent_frame=pendulum_base_offset
        socket_child_frame=pendulum_head_offset
      Coordinate rz: default_value=0.5
      PhysicalOffsetFrame pendulum_base_offset: socket_parent=/bodyset/pendulum_base
      PhysicalOffsetFrame pendulum_head_offset: socket_parent=/bodyset/pendulum_head translation=(0 0.5 0)
