# OpenSim document version 40000
Model:
  Ground
  BodySet:
    Body pendulum_base: mass=1 [kg] mass_center=(0 0 0) inertia=(1 1 1 0 0 0)
      Brick pendulum_base_geom_1: half_lengths=(0.1 0.1 0.1)
  JointSet:
    WeldJoint pendulum_base_to_ground: socket_parent_frame=ground_offset socket_child_frame=pendulum_base_offset
      PhysicalOffsetFrame ground_offset: socket_parent=/ground translation=(0 1 0) [meters]
      PhysicalOffsetFrame pendulum_base_offset: socket_parent=/bodyset/pendulum_base
