# OpenSim document version 40000
Model:
  Ground
  BodySet:
    Body foot: mass=1 [kg] mass_center=(0 0 0) inertia=(1 1 1 0 0 0)
      Sphere foot_geom_1: radius=0.1
  JointSet:
    FreeJoint foot_to_ground: socket_parent_frame=ground_offset socket_child_frame=foot_offset
      Coordinate rx
      Coordinate ry
      Coordinate rz
      Coordinate tx
      Coordinate ty
      Coordinate tz
      PhysicalOffsetFrame ground_offset: socket_parent=/ground
      PhysicalOffsetFrame foot_offset: socket_parent=/bodyset/foot translation=(0 -0.5 0) [meters]
