# OpenSim document version 40000
Model:
  Ground
  BodySet:
    Body foot: mass=1 [kg] mass_center=(0 0 0) inertia=(1 1 1 0 0 0)
      PhysicalOffsetFrame foot_offsetframe: socket_parent=.. translation=(0 0.25 0) [meters]
        Brick foot_offsetframe_geom_1: half_lengths=(0.025 0.25 0.025)
      Sphere foot_geom_1: radius=0.1
    Body knee: mass=1 mass_center=(0 0 0) inertia=(1 1 1 0 0 0)
      PhysicalOffsetFrame knee_offsetframe: socket_parent=.. translation=(0 0.25 0)
        Brick knee_offsetframe_geom_1: half_lengths=(0.025 0.25 0.025)
      Sphere knee_geom_1: radius=0.1
    Body head: mass=1 mass_center=(0 0 0) inertia=(1 1 1 0 0 0)
      Brick head_geom_1: half_lengths=(0.1 0.1 0.1)
  JointSet:
    FreeJoint ground_to_foot: socket_parent_frame=ground_offset socket_child_frame=foot_offset
      Coordinate rx
      Coordinate ry
      Coordinate rz: default_value=0.698
      Coordinate tx
      Coordinate ty: default_value=0.5
      Coordinate tz
      PhysicalOffsetFrame ground_offset: socket_parent=/ground
      PhysicalOffsetFrame foot_offset: socket_parent=/bodyset/foot
    PinJoint foot_to_knee: socket_parent_frame=foot_offset socket_child_frame=knee_offset
      Coordinate rz: default_value=-1.396
      PhysicalOffsetFrame foot_offset: socket_parent=/bodyset/foot translation=(0 0.5 0)
      PhysicalOffsetFrame knee_offset: socket_parent=/bodyset/knee translation=(0 0 0)
    PinJoint knee_to_head: socket_parent_frame=knee_offset socket_child_frame=head_offset
      Coordinate rz
      PhysicalOffsetFrame knee_offset: socket_parent=/bodyset/knee translation=(0 0.5 0)
      PhysicalOffsetFrame head_offset: socket_parent=/bodyset/head
  ConstraintSet:
    PointOnLineConstraint foot_Y_lock: socket_line_body=/ground socket_follower_body=/bodyset/foot
        line_direction_vec=(0 1 0)
    PointOnLineConstraint head_Y_lock: socket_line_body=/ground socket_follower_body=/bodyset/head
        line_direction_vec=(0 1 0)
  ForceSet:
    HuntCrossleyForce:
      ContactParametersSet contact_parameters:
        ContactParameters: geometry=(floor_contact foot_contact) stiffness=100000000 dissipation=0.5
            static_friction=0.9 dynamic_friction=0.9 viscous_friction=0.6
    PointToPointSpring foot_to_head_spring: socket_body1=/bodyset/foot socket_body2=/bodyset/head stiffness=2000 [N/m]
        rest_length=0.8 [m]
  ContactGeometrySet:
    ContactHalfSpace floor_contact: socket_frame=/ground orientation=(0 0 -1.5707)
    ContactSphere foot_contact: socket_frame=/bodyset/foot radius=0.1
