# OpenSim document version 40000
Model:
  Ground:
    PhysicalOffsetFrame ceiling_decoration_offset: socket_parent=.. translation=(0 0.75 0) [meters]
        meshes=/Users/akewley/Desktop/opensim-creator/resources/geometry/block.vtp
  BodySet:
    Body pendulum_head: mass=1 [kg]
      PhysicalOffsetFrame pendulum_head_decoration_offset: socket_parent=.. translation=(0 0 0)
          meshes=/Users/akewley/Desktop/opensim-creator/resources/geometry/block.vtp
      PhysicalOffsetFrame pendulum_head_strut_decoration_offset: socket_parent=.. translation=(0 0.125 0)
          meshes=/Users/akewley/Desktop/opensim-creator/resources/geometry/block.vtp
    Body pendulum_head_2: mass=1
      PhysicalOffsetFrame pendulum_head_2_decoration_offset: socket_parent=.. translation=(0 0 0)
          meshes=/Users/akewley/Desktop/opensim-creator/resources/geometry/block.vtp
      PhysicalOffsetFrame pendulum_head_2_strut_decoration_offset: socket_parent=.. translation=(0 0.125 0)
          meshes=/Users/akewley/Desktop/opensim-creator/resources/geometry/block.vtp
  JointSet:
    PinJoint pendulum_head_to_ground: socket_parent_frame=ground_offset socket_child_frame=pendulum_head_offset
      Coordinate pendulum_head_to_ground_rz
      PhysicalOffsetFrame ground_offset: socket_parent=/ground translation=(0 0.75 0)
      PhysicalOffsetFrame pendulum_head_offset: socket_parent=/bodyset/pendulum_head translation=(0 0.25 0)
    PinJoint pendulum_head_2_to_pendulum_head: socket_parent_frame=pendulum_head_offset
        socket_child_frame=pendulum_head_2_offset
      Coordinate pendulum_head_2_to_pendulum_head_rz
      PhysicalOffsetFrame pendulum_head_offset: socket_parent=/bodyset/pendulum_head translation=(0 0 0)
      PhysicalOffsetFrame pendulum_head_2_offset: socket_parent=/bodyset/pendulum_head_2 translation=(0 0.25 0)
