# OpenSim document version 40000
Model:
  Ground:
    PhysicalOffsetFrame arm_r_3mc_offset: socket_parent=.. translation=(0 0.4588709 0) [meters]
        meshes=C:\Users\adamk\OneDrive\Desktop\tutorial4_arm-meshes\arm_r_3mc.vtp
    PhysicalOffsetFrame arm_r_3midph_offset: socket_parent=.. translation=(0 0.4588709 0)
        meshes=C:\Users\adamk\OneDrive\Desktop\tutorial4_arm-meshes\arm_r_3midph.vtp
    PhysicalOffsetFrame arm_r_3proxph_offset: socket_parent=.. translation=(0 0.4588709 0)
        meshes=C:\Users\adamk\OneDrive\Desktop\tutorial4_arm-meshes\arm_r_3proxph.vtp
    PhysicalOffsetFrame arm_r_4distph_offset: socket_parent=.. translation=(0 0.4588709 0)
        meshes=C:\Users\adamk\OneDrive\Desktop\tutorial4_arm-meshes\arm_r_4distph.vtp
    PhysicalOffsetFrame arm_r_4mc_offset: socket_parent=.. translation=(0 0.4588709 0)
        meshes=C:\Users\adamk\OneDrive\Desktop\tutorial4_arm-meshes\arm_r_4mc.vtp
    PhysicalOffsetFrame arm_r_4midph_offset: socket_parent=.. translation=(0 0.4588709 0)
        meshes=C:\Users\adamk\OneDrive\Desktop\tutorial4_arm-meshes\arm_r_4midph.vtp
    PhysicalOffsetFrame arm_r_4proxph_offset: socket_parent=.. translation=(0 0.4588709 0)
        meshes=C:\Users\adamk\OneDrive\Desktop\tutorial4_arm-meshes\arm_r_4proxph.vtp
    PhysicalOffsetFrame arm_r_5distph_offset: socket_parent=.. translation=(0 0.4588709 0)
        meshes=C:\Users\adamk\OneDrive\Desktop\tutorial4_arm-meshes\arm_r_5distph.vtp
    PhysicalOffsetFrame arm_r_5mc_offset: socket_parent=.. translation=(0 0.4588709 0)
        meshes=C:\Users\adamk\OneDrive\Desktop\tutorial4_arm-meshes\arm_r_5mc.vtp
    PhysicalOffsetFrame arm_r_5midph_offset: socket_parent=.. translation=(0 0.4588709 0)
        meshes=C:\Users\adamk\OneDrive\Desktop\tutorial4_arm-meshes\arm_r_5midph.vtp
    PhysicalOffsetFrame arm_r_5proxph_offset: socket_parent=.. translation=(0 0.4588709 0)
        meshes=C:\Users\adamk\OneDrive\Desktop\tutorial4_arm-meshes\arm_r_5proxph.vtp
    PhysicalOffsetFrame arm_r_thumbdist_offset: socket_parent=.. translation=(0 0.4588709 0)
        meshes=C:\Users\adamk\OneDrive\Desktop\tutorial4_arm-meshes\arm_r_thumbdist.vtp
    PhysicalOffsetFrame arm_r_thumbprox_offset: socket_parent=.. translation=(0 0.4588709 0)
        meshes=C:\Users\adamk\OneDrive\Desktop\tutorial4_arm-meshes\arm_r_thumbprox.vtp
    PhysicalOffsetFrame arm_r_1mc_offset: socket_parent=.. translation=(0 0.4588709 0)
        meshes=C:\Users\adamk\OneDrive\Desktop\tutorial4_arm-meshes\arm_r_1mc.vtp
    PhysicalOffsetFrame arm_r_3distph_offset: socket_parent=.. translation=(0 0.4588709 0)
        meshes=C:\Users\adamk\OneDrive\Desktop\tutorial4_arm-meshes\arm_r_3distph.vtp
  BodySet:
    Body arm_b: mass=5 [kg]
      PhysicalOffsetFrame arm_r_radius_offset: socket_parent=.. translation=(-0.004438001 0.1401015 -0.03841887)
          meshes=C:\Users\adamk\OneDrive\Desktop\tutorial4_arm-meshes\arm_r_radius.vtp
      PhysicalOffsetFrame arm_r_ulna_offset: socket_parent=.. translation=(-0.004438001 0.1401015 -0.03841887)
          meshes=C:\Users\adamk\OneDrive\Desktop\tutorial4_arm-meshes\arm_r_ulna.vtp
      Station ulna_wrist_att: .. (0.001348537 -0.07671355 0.002583411)
      Station radius_wrist_att: .. (0.004200754 -0.07597663 0.02834914)
    Body wrist_b: mass=1
      PhysicalOffsetFrame [values shared by the 8 below unless stated]: socket_parent=..
          orientation=(-0.3494294 -0.3145135 -1.677823) [radians]
      PhysicalOffsetFrame arm_r_capitate_offset: translation=(0.2733073 -0.01264522 0.02289481)
          meshes=C:\Users\adamk\OneDrive\Desktop\tutorial4_arm-meshes\arm_r_capitate.vtp
      PhysicalOffsetFrame arm_r_hamate_offset: translation=(0.2733073 -0.01264522 0.02289481)
          meshes=C:\Users\adamk\OneDrive\Desktop\tutorial4_arm-meshes\arm_r_hamate.vtp
      PhysicalOffsetFrame arm_r_lunate_offset: translation=(0.2733073 -0.01264522 0.02289481)
          meshes=C:\Users\adamk\OneDrive\Desktop\tutorial4_arm-meshes\arm_r_lunate.vtp
      PhysicalOffsetFrame arm_r_pisiform_offset: translation=(0.2733073 -0.01264522 0.02289481)
          meshes=C:\Users\adamk\OneDrive\Desktop\tutorial4_arm-meshes\arm_r_pisiform.vtp
      PhysicalOffsetFrame arm_r_scaphoid_offset: translation=(0.2733073 -0.01264522 0.02289481)
          meshes=C:\Users\adamk\OneDrive\Desktop\tutorial4_arm-meshes\arm_r_scaphoid.vtp
      PhysicalOffsetFrame arm_r_trapezium_offset: translation=(0.2733073 -0.01264522 0.02289481)
          meshes=C:\Users\adamk\OneDrive\Desktop\tutorial4_arm-meshes\arm_r_trapezium.vtp
      PhysicalOffsetFrame arm_r_trapezoid_offset: translation=(0.2733073 -0.01264522 0.02289481)
          meshes=C:\Users\adamk\OneDrive\Desktop\tutorial4_arm-meshes\arm_r_trapezoid.vtp
      PhysicalOffsetFrame arm_r_triquetrum_offset: translation=(0.2733073 -0.01264522 0.02289481)
          meshes=C:\Users\adamk\OneDrive\Desktop\tutorial4_arm-meshes\arm_r_triquetrum.vtp
      Station wrist_mid_att: .. (0.001553833 -0.004988663 0.005130187)
      Station wrist_ulna_att: .. (0.01164199 -0.01001063 -0.007343143)
      Station wrist_radius_att: .. (0.009375304 -0.004256112 0.01321965)
    Body arm_r_2mc_b: mass=1
      PhysicalOffsetFrame arm_r_2mc_offset: socket_parent=.. translation=(0.3151143 0.02548426 -0.01819402)
          orientation=(-0.2276388 -0.2439847 -1.500861)
          meshes=C:\Users\adamk\OneDrive\Desktop\tutorial4_arm-meshes\arm_r_2mc.vtp
      Station arm_r_2mc_bot_att: .. (-0.0231711 -0.007257175 0.0006406605)
      Station arm_r_2mc_top_att: .. (0.02414781 -0.00650163 0.0002645254)
    Body arm_r_2proxph_b: mass=1
      PhysicalOffsetFrame arm_r_2proxph_offset: socket_parent=.. translation=(0.3681909 0.01133638 -0.02145374)
          orientation=(-0.2186679 -0.2232388 -1.549941)
          meshes=C:\Users\adamk\OneDrive\Desktop\tutorial4_arm-meshes\arm_r_2proxph.vtp
      Station arm_r_2proxph_bot_att: .. (-0.0139528 -0.0003873464 0.0010712)
      Station arm_r_2proxph_top_att: .. (0.01185127 -0.002484154 0.0006927624)
    Body arm_r_2midph_b: mass=1
      PhysicalOffsetFrame arm_r_2midph_offset: socket_parent=.. translation=(0.4007397 0.000802977 -0.0214816)
          orientation=(-0.2224596 -0.2207655 -1.578503)
          meshes=C:\Users\adamk\OneDrive\Desktop\tutorial4_arm-meshes\arm_r_2midph.vtp
      Station arm_r_2midph_bot_att: .. (-0.00654408 -0.002168555 0.0008042008)
      Station arm_r_2midph_top_att: .. (0.007363588 -0.002740751 0.0008273572)
    Body arm_r_2distph_b: mass=1
      PhysicalOffsetFrame arm_r_2distph_offset: socket_parent=.. translation=(0.4150788 -0.03996655 -0.0577977)
          orientation=(-0.1345781 -0.1213706 -1.67419)
          meshes=C:\Users\adamk\OneDrive\Desktop\tutorial4_arm-meshes\arm_r_2distph.vtp
      Station arm_r_distph_att: .. (0.003831152 -0.002827544 -0.000327073)
  JointSet:
    WeldJoint arm_r_arm_to_ground: socket_parent_frame=ground_offset socket_child_frame=arm_b_offset
      PhysicalOffsetFrame ground_offset: socket_parent=/ground translation=(0.004438001 0.3187694 0.03841887)
      PhysicalOffsetFrame arm_b_offset: socket_parent=/bodyset/arm_b translation=(0 0 0)
    PinJoint arm_r_wrist_to_arm: socket_parent_frame=arm_b_offset socket_child_frame=wrist_b_offset
      Coordinate arm_r_wrist_to_arm_rz
      PhysicalOffsetFrame arm_b_offset: socket_parent=/bodyset/arm_b translation=(0.002143249 -0.1057546 0.02326368)
          orientation=(-0.1087183 0.08578306 1.593226)
      PhysicalOffsetFrame wrist_b_offset: socket_parent=/bodyset/wrist_b
          translation=(0.02109867 -4.656613e-9 1.490116e-8) orientation=(-0.2502617 -0.2145276 -0.06328811)
    PinJoint arm_r_2_mc_to_wrist: socket_parent_frame=wrist_b_offset socket_child_frame=arm_r_2mc_b_offset
      Coordinate arm_r_2_mc_to_wrist_rz
      PhysicalOffsetFrame wrist_b_offset: socket_parent=/bodyset/wrist_b
          translation=(-0.01132762 0.002806381 0.008421868) orientation=(-0.0573191 -0.1057248 -0.08013488)
      PhysicalOffsetFrame arm_r_2mc_b_offset: socket_parent=/bodyset/arm_r_2mc_b
          translation=(0.03141585 -3.72529e-9 -7.450581e-9) orientation=(0.02267368 0.007817705 0.06502442)
    PinJoint arm_r_2_proxph_to_mc: socket_parent_frame=arm_r_2mc_b_offset socket_child_frame=arm_r_2proxph_b_offset
      Coordinate arm_r_2_proxph_to_mc_rz
      PhysicalOffsetFrame arm_r_2mc_b_offset: socket_parent=/bodyset/arm_r_2mc_b
          translation=(-0.03209675 -0.003232945 0.0003077239) orientation=(-0.08341983 0.05056493 0.04779206)
      PhysicalOffsetFrame arm_r_2proxph_b_offset: socket_parent=/bodyset/arm_r_2proxph_b
          translation=(0.0201482 -1.862645e-9 0) orientation=(-0.06020114 0.06387371 -0.002618062)
    PinJoint arm_r_2_midph_to_proxph: socket_parent_frame=arm_r_2proxph_b_offset
        socket_child_frame=arm_r_2midph_b_offset
      Coordinate arm_r_2_midph_to_proxph_rz
      PhysicalOffsetFrame arm_r_2proxph_b_offset: socket_parent=/bodyset/arm_r_2proxph_b
          translation=(-0.01989594 -0.0001761951 0.00147289) orientation=(0.03172854 -0.02459343 0.03224726)
      PhysicalOffsetFrame arm_r_2midph_b_offset: socket_parent=/bodyset/arm_r_2midph_b
          translation=(0.01240035 0 -7.450581e-9) orientation=(0.03348427 -0.02917809 0.00464415)
    PinJoint arm_r_2_distph_to_midph: socket_parent_frame=arm_r_2midph_b_offset
        socket_child_frame=arm_r_2distph_b_offset
      Coordinate arm_r_2_distph_to_midph_rz
      PhysicalOffsetFrame arm_r_2midph_b_offset: socket_parent=/bodyset/arm_r_2midph_b
          translation=(-0.01212298 -0.0004858728 0.0009830594) orientation=(-0.01849523 0.02326236 0.05305366)
      PhysicalOffsetFrame arm_r_2distph_b_offset: socket_parent=/bodyset/arm_r_2distph_b
          translation=(0.007618345 9.313226e-10 0) orientation=(0.09272632 0.10018 -0.06052875)
  ForceSet:
    Millard2012EquilibriumMuscle [values shared by the 6 below unless stated]:
      ActiveForceLengthCurve: minimum_value=0
      ForceVelocityCurve: concentric_slope_at_vmax=0 concentric_slope_near_vmax=0.25 isometric_slope=5
          eccentric_slope_at_vmax=0 eccentric_slope_near_vmax=0.15 max_eccentric_velocity_force_multiplier=1.4
      FiberForceLengthCurve
      TendonForceLengthCurve
    Millard2012EquilibriumMuscle: min_control=0.01 max_control=1
      PathPoint Millard2012EquilibriumMuscle-P1: arm_r_2distph_b (0.003831152 -0.002827544 -0.000327073)
      PathPoint Millard2012EquilibriumMuscle-P2: arm_r_2midph_b (-0.00654408 -0.002168555 0.0008042008)
    Millard2012EquilibriumMuscle Millard2012EquilibriumMuscle_0: min_control=0.01 max_control=1
      PathPoint Millard2012EquilibriumMuscle-P1: arm_r_2midph_b (0.007363588 -0.002740751 0.0008273572)
      PathPoint Millard2012EquilibriumMuscle-P2: arm_r_2proxph_b (-0.0139528 -0.0003873464 0.0010712)
    Millard2012EquilibriumMuscle Millard2012EquilibriumMuscle_1: min_control=0.01 max_control=1 default_activation=1
      PathPoint Millard2012EquilibriumMuscle-P1: arm_r_2proxph_b (0.01185127 -0.002484154 0.0006927624)
      PathPoint Millard2012EquilibriumMuscle-P2: arm_r_2mc_b (-0.0231711 -0.007257175 0.0006406605)
    Millard2012EquilibriumMuscle Millard2012EquilibriumMuscle_2: min_control=0.01 max_control=1
      PathPoint Millard2012EquilibriumMuscle-P1: arm_r_2mc_b (0.02414781 -0.00650163 0.0002645254)
      PathPoint Millard2012EquilibriumMuscle-P2: wrist_b (0.001553833 -0.004988663 0.005130187)
    Millard2012EquilibriumMuscle Millard2012EquilibriumMuscle_3: min_control=0.01 max_control=1
      PathPoint Millard2012EquilibriumMuscle-P1: wrist_b (0.009375304 -0.004256112 0.01321965)
      PathPoint Millard2012EquilibriumMuscle-P2: arm_b (0.004200754 -0.07597663 0.02834914)
    Millard2012EquilibriumMuscle Millard2012EquilibriumMuscle_4: min_control=0.01 max_control=1
      PathPoint Millard2012EquilibriumMuscle-P1: wrist_b (0.01164199 -0.01001063 -0.007343143)
      PathPoint Millard2012EquilibriumMuscle-P2: arm_b (0.001348537 -0.07671355 0.002583411)
