# OpenSim document version 40000
Model:
  Ground:
    PhysicalOffsetFrame arm_r_1mc_offset: socket_parent=.. translation=(0 0.4527673 0) [meters]
        meshes=C:\Users\adamk\OneDrive\Desktop\tutorial4_arm-meshes\arm_r_1mc.vtp
    PhysicalOffsetFrame arm_r_3distph_offset: socket_parent=.. translation=(0 0.4527673 0)
        meshes=C:\Users\adamk\OneDrive\Desktop\tutorial4_arm-meshes\arm_r_3distph.vtp
    PhysicalOffsetFrame arm_r_3mc_offset: socket_parent=.. translation=(0 0.4527673 0)
        meshes=C:\Users\adamk\OneDrive\Desktop\tutorial4_arm-meshes\arm_r_3mc.vtp
    PhysicalOffsetFrame arm_r_3midph_offset: socket_parent=.. translation=(0 0.4527673 0)
        meshes=C:\Users\adamk\OneDrive\Desktop\tutorial4_arm-meshes\arm_r_3midph.vtp
    PhysicalOffsetFrame arm_r_3proxph_offset: socket_parent=.. translation=(0 0.4527673 0)
        meshes=C:\Users\adamk\OneDrive\Desktop\tutorial4_arm-meshes\arm_r_3proxph.vtp
    PhysicalOffsetFrame arm_r_4distph_offset: socket_parent=.. translation=(0 0.4527673 0)
        meshes=C:\Users\adamk\OneDrive\Desktop\tutorial4_arm-meshes\arm_r_4distph.vtp
    PhysicalOffsetFrame arm_r_4mc_offset: socket_parent=.. translation=(0 0.4527673 0)
        meshes=C:\Users\adamk\OneDrive\Desktop\tutorial4_arm-meshes\arm_r_4mc.vtp
    PhysicalOffsetFrame arm_r_4midph_offset: socket_parent=.. translation=(0 0.4527673 0)
        meshes=C:\Users\adamk\OneDrive\Desktop\tutorial4_arm-meshes\arm_r_4midph.vtp
    PhysicalOffsetFrame arm_r_4proxph_offset: socket_parent=.. translation=(0 0.4527673 0)
        meshes=C:\Users\adamk\OneDrive\Desktop\tutorial4_arm-meshes\arm_r_4proxph.vtp
    PhysicalOffsetFrame arm_r_5distph_offset: socket_parent=.. translation=(0 0.4527673 0)
        meshes=C:\Users\adamk\OneDrive\Desktop\tutorial4_arm-meshes\arm_r_5distph.vtp
    PhysicalOffsetFrame arm_r_5mc_offset: socket_parent=.. translation=(0 0.4527673 0)
        meshes=C:\Users\adamk\OneDrive\Desktop\tutorial4_arm-meshes\arm_r_5mc.vtp
    PhysicalOffsetFrame arm_r_5midph_offset: socket_parent=.. translation=(0 0.4527673 0)
        meshes=C:\Users\adamk\OneDrive\Desktop\tutorial4_arm-meshes\arm_r_5midph.vtp
    PhysicalOffsetFrame arm_r_5proxph_offset: socket_parent=.. translation=(0 0.4527673 0)
        meshes=C:\Users\adamk\OneDrive\Desktop\tutorial4_arm-meshes\arm_r_5proxph.vtp
    PhysicalOffsetFrame arm_r_thumbdist_offset: socket_parent=.. translation=(0 0.4527673 0)
        meshes=C:\Users\adamk\OneDrive\Desktop\tutorial4_arm-meshes\arm_r_thumbdist.vtp
    PhysicalOffsetFrame arm_r_thumbprox_offset: socket_parent=.. translation=(0 0.4527673 0)
        meshes=C:\Users\adamk\OneDrive\Desktop\tutorial4_arm-meshes\arm_r_thumbprox.vtp
    PhysicalOffsetFrame arm_r_ulna_offset: socket_parent=.. translation=(0 0.4527673 0)
        meshes=C:\Users\adamk\OneDrive\Desktop\tutorial4_arm-meshes\arm_r_ulna.vtp
  BodySet:
    Body arm_r_b: mass=1 [kg]
      PhysicalOffsetFrame arm_r_radius_offset: socket_parent=.. translation=(-0.00299859 0.1365348 -0.04172629)
          meshes=C:\Users\adamk\OneDrive\Desktop\tutorial4_arm-meshes\arm_r_radius.vtp
    Body arm_r_wrist_b: mass=1
      PhysicalOffsetFrame arm_r_capitate_offset: socket_parent=.. translation=(-0.008724499 0.265805 -0.0682095)
          meshes=C:\Users\adamk\OneDrive\Desktop\tutorial4_arm-meshes\arm_r_capitate.vtp
      PhysicalOffsetFrame arm_r_hamate_offset: socket_parent=.. translation=(-0.008724499 0.265805 -0.0682095)
          meshes=C:\Users\adamk\OneDrive\Desktop\tutorial4_arm-meshes\arm_r_hamate.vtp
      PhysicalOffsetFrame arm_r_lunate_offset: socket_parent=.. translation=(-0.008724499 0.265805 -0.0682095)
          meshes=C:\Users\adamk\OneDrive\Desktop\tutorial4_arm-meshes\arm_r_lunate.vtp
      PhysicalOffsetFrame arm_r_pisiform_offset: socket_parent=.. translation=(-0.008724499 0.265805 -0.0682095)
          meshes=C:\Users\adamk\OneDrive\Desktop\tutorial4_arm-meshes\arm_r_pisiform.vtp
      PhysicalOffsetFrame arm_r_scaphoid_offset: socket_parent=.. translation=(-0.008724499 0.265805 -0.0682095)
          meshes=C:\Users\adamk\OneDrive\Desktop\tutorial4_arm-meshes\arm_r_scaphoid.vtp
      PhysicalOffsetFrame arm_r_trapezium_offset: socket_parent=.. translation=(-0.008724499 0.265805 -0.0682095)
          meshes=C:\Users\adamk\OneDrive\Desktop\tutorial4_arm-meshes\arm_r_trapezium.vtp
      PhysicalOffsetFrame arm_r_trapezoid_offset: socket_parent=.. translation=(-0.008724499 0.265805 -0.0682095)
          meshes=C:\Users\adamk\OneDrive\Desktop\tutorial4_arm-meshes\arm_r_trapezoid.vtp
      PhysicalOffsetFrame arm_r_triquetrum_offset: socket_parent=.. translation=(-0.008724499 0.265805 -0.0682095)
          meshes=C:\Users\adamk\OneDrive\Desktop\tutorial4_arm-meshes\arm_r_triquetrum.vtp
      Station arm_r_wrist_origin: .. (0.00881413 -0.004532069 0.009209409)
    Body arm_r_2mc_b: mass=1
      PhysicalOffsetFrame arm_r_2mc_offset: socket_parent=.. translation=(-0.009134 0.3041705 -0.0858195)
          meshes=C:\Users\adamk\OneDrive\Desktop\tutorial4_arm-meshes\arm_r_2mc.vtp
      Station arm_r_2mc_origin: .. (0.004778342 -0.02601364 0.007158488)
      Station arm_r_2mc_insertion: .. (0.005396353 0.02633847 -0.00488016)
    Body arm_r_2proxph_b: mass=1
      PhysicalOffsetFrame arm_r_2proxph_offset: socket_parent=.. translation=(-0.0083145 0.355213 -0.09953851)
          meshes=C:\Users\adamk\OneDrive\Desktop\tutorial4_arm-meshes\arm_r_2proxph.vtp
      Station arm_r_2proxph_origin: .. (0.001623048 -0.01622827 0.005173288)
      Station arm_r_2proxph_insertion: .. (0.003858415 0.0146298 -0.003875963)
    Body arm_r_2midph_b: mass=1
      PhysicalOffsetFrame arm_r_2midph_offset: socket_parent=.. translation=(-0.008501 0.3864105 -0.1080235)
          meshes=C:\Users\adamk\OneDrive\Desktop\tutorial4_arm-meshes\arm_r_2midph.vtp
      Station arm_2_midph_origin: .. (0.002842315 -0.009354912 0.002381675)
      Station arm_r_2midph_insertion: .. (0.002746456 0.009236671 -0.003032833)
    Body arm_r_2distph_b: mass=1
      PhysicalOffsetFrame arm_r_2distph_offset: socket_parent=.. translation=(-0.010062 0.405569 -0.1124315)
          meshes=C:\Users\adamk\OneDrive\Desktop\tutorial4_arm-meshes\arm_r_2distph.vtp
      Station arm_r_2distph_insertion: .. (0.002059573 0.006360084 -0.0008304715)
  JointSet:
    WeldJoint arm_r_to_ground: socket_parent_frame=ground_offset socket_child_frame=arm_r_b_offset
      PhysicalOffsetFrame ground_offset: socket_parent=/ground translation=(0.00299859 0.3162325 0.04172629)
      PhysicalOffsetFrame arm_r_b_offset: socket_parent=/bodyset/arm_r_b translation=(0 0 0)
    PinJoint arm_r_wrist_to_arm: socket_parent_frame=arm_r_b_offset socket_child_frame=arm_r_wrist_b_offset
      Coordinate arm_r_wrist_to_arm_rz
      PhysicalOffsetFrame arm_r_b_offset: socket_parent=/bodyset/arm_r_b translation=(0.004780792 -0.106605 0.01849736)
          orientation=(-0.1794617 0.1716334 1.615612) [radians]
      PhysicalOffsetFrame arm_r_wrist_b_offset: socket_parent=/bodyset/arm_r_wrist_b
          translation=(-0.0009451173 0.02266526 -0.007985845) orientation=(-0.1794617 0.1716334 1.615612)
    PinJoint arm_r_2mc_to_wrist: socket_parent_frame=arm_r_wrist_b_offset socket_child_frame=arm_r_2mc_b_offset
      Coordinate arm_r_2mc_to_wrist_rz
      PhysicalOffsetFrame arm_r_wrist_b_offset: socket_parent=/bodyset/arm_r_wrist_b
          translation=(0.003130188 -0.008218855 0.01142772) orientation=(-0.3402159 0.1689623 1.45489)
      PhysicalOffsetFrame arm_r_2mc_b_offset: socket_parent=/bodyset/arm_r_2mc_b
          translation=(0.002720688 0.03014664 -0.006182283) orientation=(-0.3402159 0.1689623 1.45489)
    PinJoint arm_r_2proxph_to_2mc: socket_parent_frame=arm_r_2mc_b_offset socket_child_frame=arm_r_2proxph_b_offset
      Coordinate arm_r_2proxph_to_2mc_rz
      PhysicalOffsetFrame arm_r_2mc_b_offset: socket_parent=/bodyset/arm_r_2mc_b
          translation=(-0.0002048686 -0.03241849 0.008320309) orientation=(-0.2496596 0.2512258 1.564477)
      PhysicalOffsetFrame arm_r_2proxph_b_offset: socket_parent=/bodyset/arm_r_2proxph_b
          translation=(0.0006146319 0.01862399 -0.005398698) orientation=(-0.2496596 0.2512258 1.564477)
    PinJoint arm_r_2midph_to_2proxph: socket_parent_frame=arm_r_2proxph_b_offset
        socket_child_frame=arm_r_2midph_b_offset
      Coordinate arm_r_2midph_to_2proxph_rz
      PhysicalOffsetFrame arm_r_2proxph_b_offset: socket_parent=/bodyset/arm_r_2proxph_b
          translation=(0.0002059434 -0.01963817 0.0062159) orientation=(-0.3097086 0.3065284 1.581283)
      PhysicalOffsetFrame arm_r_2midph_b_offset: socket_parent=/bodyset/arm_r_2midph_b
          translation=(1.944322e-5 0.01155933 -0.002269097) orientation=(-0.3097086 0.3065284 1.581283)
    PinJoint arm_r_2distph_to_2midph: socket_parent_frame=arm_r_2midph_b_offset
        socket_child_frame=arm_r_2distph_b_offset
      Coordinate arm_r_2distph_to_2midph_rz
      PhysicalOffsetFrame arm_r_2midph_b_offset: socket_parent=/bodyset/arm_r_2midph_b
          translation=(0.001040814 -0.01163228 0.003615268) orientation=(-0.3277851 0.3002037 1.660035)
      PhysicalOffsetFrame arm_r_2distph_b_offset: socket_parent=/bodyset/arm_r_2distph_b
          translation=(-0.0005201865 0.00752623 -0.0007927269) orientation=(-0.3277851 0.3002037 1.660035)
