# OpenSim document version 40500
Model:
  Ground
  BodySet:
    Body some_body: mass=1 [kg] mass_center=(0 0 0) inertia=(1 1 1 0 0 0)
  JointSet:
    WeldJoint: socket_parent_frame=ground_offset socket_child_frame=some_body_offset
      PhysicalOffsetFrame ground_offset: socket_parent=/ground
      PhysicalOffsetFrame some_body_offset: socket_parent=/bodyset/some_body
