# OpenSim document version 40000
Model test:
  gravity: 0 -9.80665 0
  length_units: meters
  force_units: N
  Ground
  BodySet:
    Body Pelvis: mass=3.18 [kg] mass_center=(0.014 0.054 0.0005) inertia=(0.012 0.017 0.012 0 0 0)
        meshes=(Hors_pelvis_r.obj Hors_pelvis_l.obj Hors_sacrum.obj)
      WrapCylinder WrapPelvis_R: xyz_body_rotation=(-0.143687 -0.211575 -0.6981) translation=(-0.0127 0.0097 0.0722)
          quadrant=x radius=0.0399 length=0.2
    Body Femur_r: mass=11.54 mass_center=(0.010112 -0.159559 -0.015013) inertia=(0.197 0.058 0.197 0 0 0)
        meshes=Hors_femur_r.obj
      WrapCylinder WrapFemur_R: xyz_body_rotation=(-0.0635214 0.0977677 1.618)
          translation=(-0.00735672 -0.406046 -0.0285596) quadrant=Y radius=0.0246 length=0.15
      WrapCylinder WrapFemur2_R: xyz_body_rotation=(-0.0635214 0.0977677 1.618)
          translation=(-0.0111737 -0.386715 0.0148761) quadrant=-Y radius=0.0246 length=0.15
  JointSet:
    CustomJoint ground_pelvis: socket_parent_frame=ground_offset socket_child_frame=Pelvis_offset
      Coordinate pelvis_tilt: default_value=0 range=(-3.14 3.14)
      Coordinate pelvis_list: default_value=0 range=(-3.14 3.14)
      Coordinate pelvis_rotation: default_value=0 range=(-3.14 3.14)
      Coordinate pelvis_tx: default_value=0 range=(-5 5)
      Coordinate pelvis_ty: default_value=0 range=(-1.5 2)
      Coordinate pelvis_tz: default_value=0 range=(-3 3)
      PhysicalOffsetFrame ground_offset: socket_parent=/ground translation=(0 0 0) [meters]
      PhysicalOffsetFrame Pelvis_offset: socket_parent=/bodyset/Pelvis translation=(0 0 0)
      SpatialTransform:
        TransformAxis rotation1: coordinates=pelvis_tilt axis=(0 0 1) LinearFunction(coefficients=1 0)
        TransformAxis rotation2: coordinates=pelvis_list axis=(1 0 0) LinearFunction(coefficients=1 0)
        TransformAxis rotation3: coordinates=pelvis_rotation axis=(0 1 0) LinearFunction(coefficients=1 0)
        TransformAxis translation1: coordinates=pelvis_tx axis=(1 0 0) LinearFunction(coefficients=1 0)
        TransformAxis translation2: coordinates=pelvis_ty axis=(0 1 0) LinearFunction(coefficients=1 0)
        TransformAxis translation3: coordinates=pelvis_tz axis=(0 0 1) LinearFunction(coefficients=1 0)
    CustomJoint hip_r: socket_parent_frame=Pelvis_offset socket_child_frame=Femur_r_offset
      Coordinate hip_flexion_r: default_value=0 range=(-0.2111848 2.117084)
      Coordinate hip_adduction_r: default_value=0 range=(-0.7068583 0.4468043)
      Coordinate hip_rotation_r: default_value=0 range=(-0.7714355 0.7749262)
      PhysicalOffsetFrame Pelvis_offset: socket_parent=/bodyset/Pelvis translation=(0 0 0.0897)
      PhysicalOffsetFrame Femur_r_offset: socket_parent=/bodyset/Femur_r translation=(0 0 0)
      SpatialTransform: axes_held_at_zero=(translation1 translation2 translation3)
        TransformAxis rotation1: coordinates=hip_flexion_r axis=(0 0 1) LinearFunction(coefficients=1 0)
        TransformAxis rotation2: coordinates=hip_adduction_r axis=(1 0 0) LinearFunction(coefficients=1 0)
        TransformAxis rotation3: coordinates=hip_rotation_r axis=(0 1 0) LinearFunction(coefficients=1 0)
  ForceSet:
    Thelen2003Muscle ADD_BREV_PROS_1_R: max_isometric_force=70.3 optimal_fiber_length=0.095 tendon_slack_length=0
        pennation_angle_at_optimal=0 [radians]
      PathPoint default: Pelvis (0.0462 -0.013 0.0205)
      PathPoint default_0: Femur_r (-0.019165 -0.080652 0.027447)
    Thelen2003Muscle ADD_BREV_PROS_2_R: max_isometric_force=70.3 optimal_fiber_length=0.095 tendon_slack_length=0
        pennation_angle_at_optimal=0
      PathPoint default: Pelvis (0.0507 -0.0132 0.0185)
      PathPoint default_0: Femur_r (-0.015544 -0.09308 0.026464)
