# OpenSim document version 40000
Model Segfaulty:
  Ground
  BodySet:
    Body pelvis: mass=1 mass_center=(0 0 0) inertia=(1 1 1 1 1 1)
  JointSet:
    PinJoint ground_pelvis: socket_parent_frame=/ground socket_child_frame=/bodyset/pelvis
    PinJoint pelvis_ground: socket_parent_frame=/bodyset/pelvis socket_child_frame=/ground
