# OpenSim document version 40000
Model:
  Ground
  BodySet:
    Body b1: mass=1 [kg] mass_center=(0 0 0) inertia=(1 1 1 0 0 0)
      Cylinder b1_geom_1: radius=0.1 half_height=0.1
    Body cy2: mass=1 mass_center=(0 0 0) inertia=(1 1 1 0 0 0)
      Cylinder cy2_geom_1: scale_factors=(2 2 2) radius=0.1 half_height=0.1
    Body sph1: mass=1 mass_center=(0 0 0) inertia=(1 1 1 0 0 0)
      Sphere sph1_geom_1: radius=0.1
    Body sph2: mass=1 mass_center=(0 0 0) inertia=(1 1 1 0 0 0)
      Sphere sph2_geom_1: scale_factors=(1 1 1) radius=0.2
    Body: mass=1 mass_center=(0 0 0) inertia=(1 1 1 0 0 0)
    Body body_0: mass=1 mass_center=(0 0 0) inertia=(1 1 1 0 0 0)
      Brick _geom_1: half_lengths=(0.1 0.1 0.1)
    Body meshed: mass=1 mass_center=(0 0 0) inertia=(1 1 1 0 0 0) meshes=hat_ribs.vtp
    Body attached_mesh: mass=1 mass_center=(0 0 0) inertia=(1 1 1 0 0 0) meshes=ground_skull.vtp
    Body cone: mass=1 mass_center=(0 0 0) inertia=(1 1 1 0 0 0)
      Cone cone_geom_1: origin=(0 0 0) direction=(0 1 0) base_radius=0.25 height=0.5
    Body torus: mass=1 mass_center=(0 0 0) inertia=(1 1 1 0 0 0)
      Torus torus_geom_1
    Body arrow: mass=1 mass_center=(0 0 0) inertia=(1 1 1 0 0 0)
      Arrow arrow_geom_1: start_point=(0 0 0) direction=(1 0 0) length=0.7
      Arrow arrow_geom_2: start_point=(0 0 0) direction=(1 1 0) length=0.3
    Body attached_mesh2: mass=1 mass_center=(0 0 0) inertia=(1 1 1 0 0 0) meshes=ground_skull.vtp
  JointSet:
    FreeJoint: socket_parent_frame=ground_offset socket_child_frame=b1_offset
      Coordinate rx
      Coordinate ry
      Coordinate rz
      Coordinate tx
      Coordinate ty
      Coordinate tz
      PhysicalOffsetFrame ground_offset: socket_parent=/ground
      PhysicalOffsetFrame b1_offset: socket_parent=/bodyset/b1
    FreeJoint freejoint_0: socket_parent_frame=ground_offset socket_child_frame=cy2_offset
      Coordinate rx
      Coordinate ry
      Coordinate rz
      Coordinate tx: default_value=0
      Coordinate ty: default_value=0
      Coordinate tz: default_value=1
      PhysicalOffsetFrame ground_offset: socket_parent=/ground
      PhysicalOffsetFrame cy2_offset: socket_parent=/bodyset/cy2
    FreeJoint freejoint_1: socket_parent_frame=ground_offset socket_child_frame=sph1_offset
      Coordinate rx
      Coordinate ry
      Coordinate rz
      Coordinate tx: default_value=1
      Coordinate ty
      Coordinate tz
      PhysicalOffsetFrame ground_offset: socket_parent=/ground
      PhysicalOffsetFrame sph1_offset: socket_parent=/bodyset/sph1
    FreeJoint freejoint_2: socket_parent_frame=ground_offset socket_child_frame=sph2_offset
      Coordinate rx
      Coordinate ry
      Coordinate rz
      Coordinate tx
      Coordinate ty
      Coordinate tz: default_value=-1
      PhysicalOffsetFrame ground_offset: socket_parent=/ground
      PhysicalOffsetFrame sph2_offset: socket_parent=/bodyset/sph2
    FreeJoint freejoint_3: socket_parent_frame=ground_offset socket_child_frame=_offset
      Coordinate rx
      Coordinate ry
      Coordinate rz
      Coordinate tx: default_value=-1
      Coordinate ty: default_value=0
      Coordinate tz
      PhysicalOffsetFrame ground_offset: socket_parent=/ground
      PhysicalOffsetFrame _offset: socket_parent=/bodyset/body
    FreeJoint freejoint_4: socket_parent_frame=ground_offset socket_child_frame=_offset
      Coordinate rx
      Coordinate ry
      Coordinate rz
      Coordinate tx: default_value=-1
      Coordinate ty
      Coordinate tz
      PhysicalOffsetFrame ground_offset: socket_parent=/ground
      PhysicalOffsetFrame _offset: socket_parent=/bodyset/body_0
    FreeJoint freejoint_5: socket_parent_frame=ground_offset socket_child_frame=meshed_offset
      Coordinate rx
      Coordinate ry
      Coordinate rz
      Coordinate tx
      Coordinate ty: default_value=1
      Coordinate tz: default_value=0
      PhysicalOffsetFrame ground_offset: socket_parent=/ground
      PhysicalOffsetFrame meshed_offset: socket_parent=/bodyset/meshed
    FreeJoint freejoint_6: socket_parent_frame=body_offset socket_child_frame=attached_mesh_offset
      Coordinate rx
      Coordinate ry
      Coordinate rz: default_value=0.75
      Coordinate tx
      Coordinate ty: default_value=0
      Coordinate tz: default_value=0.5
      PhysicalOffsetFrame body_offset: socket_parent=/bodyset/meshed
      PhysicalOffsetFrame attached_mesh_offset: socket_parent=/bodyset/attached_mesh
    FreeJoint freejoint_7: socket_parent_frame=meshed_offset socket_child_frame=cone_offset
      Coordinate rx
      Coordinate ry
      Coordinate rz
      Coordinate tx
      Coordinate ty
      Coordinate tz: default_value=-0.5
      PhysicalOffsetFrame meshed_offset: socket_parent=/bodyset/meshed
      PhysicalOffsetFrame cone_offset: socket_parent=/bodyset/cone
    FreeJoint freejoint_8: socket_parent_frame=meshed_offset socket_child_frame=torus_offset
      Coordinate rx
      Coordinate ry
      Coordinate rz
      Coordinate tx: default_value=0.5
      Coordinate ty
      Coordinate tz
      PhysicalOffsetFrame meshed_offset: socket_parent=/bodyset/meshed
      PhysicalOffsetFrame torus_offset: socket_parent=/bodyset/torus
    FreeJoint freejoint_9: socket_parent_frame=meshed_offset socket_child_frame=arrow_offset
      Coordinate rx
      Coordinate ry
      Coordinate rz: default_value=-0.5
      Coordinate tx: default_value=-0.5
      Coordinate ty
      Coordinate tz
      PhysicalOffsetFrame meshed_offset: socket_parent=/bodyset/meshed
      PhysicalOffsetFrame arrow_offset: socket_parent=/bodyset/arrow
    FreeJoint freejoint_10: socket_parent_frame=attached_mesh_offset socket_child_frame=attached_mesh2_offset
      Coordinate rx
      Coordinate ry
      Coordinate rz
      Coordinate tx: default_value=0
      Coordinate ty: default_value=0.5
      Coordinate tz: default_value=0.5
      PhysicalOffsetFrame attached_mesh_offset: socket_parent=/bodyset/attached_mesh
      PhysicalOffsetFrame attached_mesh2_offset: socket_parent=/bodyset/attached_mesh2
