# OpenSim document version 40600
Model:
  Ground
  BodySet:
    Body top: mass=1 [kg] mass_center=(0 0 0) inertia=(1 1 1 0 0 0)
      Brick top_geom_1: half_lengths=(0.2 0.01 0.2)
    Body bottom: mass=1 mass_center=(0 0 0) inertia=(1 1 1 0 0 0)
      Brick bottom_geom_1: half_lengths=(0.2 0.01 0.2)
  JointSet:
    WeldJoint top_to_ground: socket_parent_frame=ground_offset socket_child_frame=top_offset
      PhysicalOffsetFrame ground_offset: socket_parent=/ground translation=(0 1 0) [meters]
      PhysicalOffsetFrame top_offset: socket_parent=/bodyset/top
    WeldJoint botto_to_ground: socket_parent_frame=ground_offset socket_child_frame=bottom_offset
      PhysicalOffsetFrame ground_offset: socket_parent=/ground
      PhysicalOffsetFrame bottom_offset: socket_parent=/bodyset/bottom
  ForceSet:
    Millard2012EquilibriumMuscle scholz_muscle: min_control=0.01 max_control=1
      Scholz2015GeometryPath path:
        path_elements:
          Scholz2015GeometryPathPoint scholz_muscle-P1:
            PathPoint: top (0 0 0)
          Scholz2015GeometryPathObstacle: socket_contact_geometry=/contactgeometryset/cylinder1
              contact_hint=(0.1012596 0 0)
          Scholz2015GeometryPathObstacle scholz2015geometrypathobstacle_0: socket_contact_geometry=/contactgeometryset/ellipsoid1
              contact_hint=(-0.06873931 0.01154135 -0.1699626)
          Scholz2015GeometryPathObstacle scholz2015geometrypathobstacle_1: socket_contact_geometry=/contactgeometryset/ellipsoid2
              contact_hint=(0.0990555 0 0.156176)
          Scholz2015GeometryPathObstacle scholz2015geometrypathobstacle_1_0: socket_contact_geometry=/contactgeometryset/torus1
              contact_hint=(0.04272335 0.01 0.05460657)
          Scholz2015GeometryPathObstacle scholz2015geometrypathobstacle_1_0_0: socket_contact_geometry=/contactgeometryset/torus2
              contact_hint=(0.1416261 0.05778804 0.009895751)
          Scholz2015GeometryPathObstacle scholz2015geometrypathobstacle_1_0_0_0: socket_contact_geometry=/contactgeometryset/sphere1
              contact_hint=(-0.08162884 0.04157161 -0.07021469)
          Scholz2015GeometryPathPoint scholz_muscle-P2:
            PathPoint: bottom (0 0 0)
      ActiveForceLengthCurve: minimum_value=0
      ForceVelocityCurve: concentric_slope_at_vmax=0 concentric_slope_near_vmax=0.25 isometric_slope=5
          eccentric_slope_at_vmax=0 eccentric_slope_near_vmax=0.15 max_eccentric_velocity_force_multiplier=1.4
      FiberForceLengthCurve
      TendonForceLengthCurve
  ContactGeometrySet:
    ContactCylinder cylinder1: socket_frame=/bodyset/top location=(0.2 -0.2 0) radius=0.1
    ContactEllipsoid ellipsoid1: socket_frame=/bodyset/top location=(-0.2147176 -0.2164392 0)
        orientation=(0 0.7853981 0) radii=(0.1 0.1 0.2)
    ContactEllipsoid ellipsoid2: socket_frame=/bodyset/top location=(0.2 -0.4699784 0) orientation=(0 0.7853981 0)
        radii=(0.1 0.1 0.2)
    ContactTorus torus1: socket_frame=/bodyset/top location=(-0.2045639 -0.5527466 -4.302529e-11)
        orientation=(1.570796 -0.7853981 0) torus_radius=0.1 tube_radius=0.05
    ContactTorus torus2: socket_frame=/bodyset/top location=(0.1791222 -0.6799125 0.1909731)
        orientation=(1.709552 0.6338541 -0.03455599) torus_radius=0.1 tube_radius=0.05
    ContactSphere sphere1: socket_frame=/bodyset/top location=(0 -0.8836202 0) radius=0.1
