# OpenSim document version 40500
Model:
  Station: new_body (0.1 0.1 0.1)
  Station Station_0: new_body (0.1 -0.1 0.1)
  Station Station_1: new_body (0.1 0 -0.1)
  Station Station_2: new_body (0.1 0 0)
  Ground
  BodySet:
    Body new_body: mass=1 [kg] mass_center=(0 0 0) inertia=(1 1 1 0 0 0)
      Brick new_body_geom_1: half_lengths=(0.1 0.1 0.1)
  JointSet:
    WeldJoint: socket_parent_frame=ground_offset socket_child_frame=new_body_offset
      PhysicalOffsetFrame ground_offset: socket_parent=/ground
      PhysicalOffsetFrame new_body_offset: socket_parent=/bodyset/new_body
