# OpenSim document version 40000
Model:
  Ground
  BodySet:
    Body: mass=1 [kg]
      PhysicalOffsetFrame: socket_parent=.. translation=(0.0001054218 0.0003130684 -0.0002351821) [meters]
          orientation=(0.0376909 -0.08824147 -2.334623) [radians] meshes=fly_tibia_mesh_scaled.stl
    Body body_0: mass=1
      PhysicalOffsetFrame: socket_parent=.. translation=(0.0003921743 0.0003630718 -0.0001264697)
          orientation=(0.3664797 -0.3656095 2.737236) meshes=fly_femur_mesh_scaled.stl
  JointSet:
    WeldJoint: socket_parent_frame=physicaloffsetframe socket_child_frame=/bodyset/body
      PhysicalOffsetFrame: socket_parent=/ground translation=(0.000155714 0.0001501322 8.124698e-6)
          orientation=(-0.0376909 -0.08824147 2.334623)
    WeldJoint weldjoint_0: socket_parent_frame=physicaloffsetframe socket_child_frame=/bodyset/body_0
      PhysicalOffsetFrame: socket_parent=/bodyset/body translation=(0.000251134 -6.348682e-5 0.0001151414)
          orientation=(-0.4389218 -0.2984101 1.186027)
