# OpenSim document version 40600
Model:
  Ground
  BodySet:
    Body new_body: mass=1 [kg] mass_center=(0 0 0) inertia=(1 1 1 0 0 0) meshes=sphere.obj
  JointSet:
    WeldJoint: socket_parent_frame=ground_offset socket_child_frame=new_body_offset
      PhysicalOffsetFrame ground_offset: socket_parent=/ground translation=(0 0.7561356 0) [meters]
      PhysicalOffsetFrame new_body_offset: socket_parent=/bodyset/new_body
