# OpenSim document version 40000
Model:
  BodySet:
    Body pectoral_girdle_b: mass=1 inertia=(0.01 0.01 0.01 0 0 0)
  JointSet:
    WeldJoint ground_to_pectoral_girdle_b: socket_parent_frame=ground_offset
        socket_child_frame=pectoral_girdle_b_offset
      PhysicalOffsetFrame ground_offset: socket_parent=/ground
      PhysicalOffsetFrame pectoral_girdle_b_offset: socket_parent=/bodyset/pectoral_girdle_b
    WeldJoint ground_to_pectoral_girdle_b_2: socket_parent_frame=ground_offset
        socket_child_frame=pectoral_girdle_b_offset
      PhysicalOffsetFrame ground_offset: socket_parent=/ground
      PhysicalOffsetFrame pectoral_girdle_b_offset: socket_parent=/bodyset/pectoral_girdle_b
