# OpenSim document version 40600
Model:
  Ground
  BodySet:
    Body new_body: mass=1 [kg] mass_center=(0 0 0) inertia=(1 1 1 0 0 0)
    Body new_body_0: mass=1 mass_center=(0 0 0) inertia=(1 1 1 0 0 0)
  JointSet:
    FreeJoint: socket_parent_frame=ground_offset socket_child_frame=new_body_offset
      Coordinate rx: default_value=0
      Coordinate ry: default_value=0
      Coordinate rz: default_value=0
      Coordinate tx: default_value=0
      Coordinate ty: default_value=0
      Coordinate tz: default_value=-0.43
      PhysicalOffsetFrame ground_offset: socket_parent=/ground
      PhysicalOffsetFrame new_body_offset: socket_parent=/bodyset/new_body
    FreeJoint freejoint_0: socket_parent_frame=ground_offset socket_child_frame=new_body_offset
      Coordinate rx: default_value=0
      Coordinate ry: default_value=0
      Coordinate rz: default_value=0
      Coordinate tx: default_value=0
      Coordinate ty: default_value=0
      Coordinate tz: default_value=0.323
      PhysicalOffsetFrame ground_offset: socket_parent=/ground
      PhysicalOffsetFrame new_body_offset: socket_parent=/bodyset/new_body_0
  ForceSet:
    Smith2018ArticularContactForce: socket_target_mesh=/contactgeometryset/Smith2018ContactMesh_0
        socket_casting_mesh=/contactgeometryset/Smith2018ContactMesh
  ContactGeometrySet:
    Smith2018ContactMesh: socket_frame=/bodyset/new_body socket_scale_frame=/bodyset/new_body mesh_file=block.vtp
    Smith2018ContactMesh Smith2018ContactMesh_0: socket_frame=/bodyset/new_body_0
        socket_scale_frame=/bodyset/new_body_0 mesh_file=arrow.vtp
