# OpenSim document version 40000
Model:
  Ground
  BodySet:
    Body b1: mass=1 [kg] mass_center=(0 0 0) inertia=(1 1 1 0 0 0)
  JointSet:
    FreeJoint: socket_parent_frame=ground_offset socket_child_frame=b1_offset
      Coordinate rx: default_value=0
      Coordinate ry: default_value=0
      Coordinate rz: default_value=0
      Coordinate tx: default_value=0
      Coordinate ty: default_value=1
      Coordinate tz: default_value=0
      PhysicalOffsetFrame ground_offset: socket_parent=/ground
      PhysicalOffsetFrame b1_offset: socket_parent=/bodyset/b1
  ConstraintSet:
    # as stated in https://github.com/ComputationalBiomechanicsLab/opensim-creator/issues/515#issuecomment-1699102942
    CoordinateCouplerConstraint: independent_coordinate_names=(tx rx ry) dependent_coordinate_name=ty
      coupled_coordinates_function: MultivariatePolynomialFunction: coefficients=(1 1 1 1) dimension=3 order=1
