# OpenSim document version 40600
ModelWarperV3Document:
  ThinPlateSplineMeshesScalingStep: source_landmarks_file=Geometry/femur_r_warp.landmarks.csv
      destination_landmarks_file=Geometry/subject_femur_r.landmarks.csv landmarks_frame=/bodyset/femur_r
      meshes=/bodyset/femur_r/femur_r_geom_1
  ThinPlateSplineStationsScalingStep: source_landmarks_file=Geometry/femur_r_warp.landmarks.csv
      destination_landmarks_file=Geometry/subject_femur_r.landmarks.csv landmarks_frame=/bodyset/femur_r
      stations=(/bodyset/femur_r/femur_r_epicondyle_centroid /bodyset/femur_r/femur_r_epicondyle_lat /bodyset/femur_r/femur_r_epicondyle_med /bodyset/femur_r/femur_r_head_center /markerset/RT1 /markerset/RT2 /markerset/RT3 /markerset/RKNE /bodyset/femur_r/knee_wrap_surface_point)
  ThinPlateSplinePathPointsScalingStep: source_landmarks_file=Geometry/femur_r_warp.landmarks.csv
      destination_landmarks_file=Geometry/subject_femur_r.landmarks.csv landmarks_frame=/bodyset/femur_r
      path_points=/forceset/glmed_r/path/glmed_r-P2
  ManuallyScaleBodySegmentsScalingStep: bodies=/bodyset/pelvis scale_factors=(0.75828 0.73484 0.771248)
  ManuallyScaleBodySegmentsScalingStep manuallyscalebodysegmentsscalingstep_0: bodies=/bodyset/tibia_r
      scale_factors=(0.776503 0.849965 0.890335)
  RecalculateWrapCylinderRadiusFromStationScalingStep: station_path=/bodyset/femur_r/knee_wrap_surface_point
      wrap_cylinder_path=/bodyset/femur_r/knee_r_frame/wrapobjectset/knee_wrap
