# OpenSim document version 40600
Model:
  StatesTrajectoryReporter states_reporter: report_time_interval=0.01 [s]
  Ground
  BodySet:
    Body head: mass=1 [kg] mass_center=(0 0 0) inertia=(0.1 0.1 0.1 0 0 0)
      PhysicalOffsetFrame strut: socket_parent=.. translation=(0 0.5 0) [meters]
        Brick strut_geom_1: half_lengths=(0.01 0.5 0.01)
      Sphere head_geom_1: radius=0.1
  JointSet:
    PinJoint pin: socket_parent_frame=ground_offset socket_child_frame=head_offset
      Coordinate pin_coord_0
      PhysicalOffsetFrame ground_offset: socket_parent=/ground translation=(0 0 0)
      PhysicalOffsetFrame head_offset: socket_parent=/bodyset/head translation=(0 1 0)
